**
** PARTS
**
*Part, name=Frame
*Node
      1,         -12.,          -6.,          6.5
      2,         -12.,           6.,          6.5
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*Element, type=B33
1,  1, 13
2, 13, 14
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*Nset, nset=FB_0_FB_1
  9, 12, 59, 60, 61
*Elset, elset=FB_0_FB_1, generate
 61,  64,   1
*Nset, nset=FB_1_FB_2
 11, 12, 56, 57, 58
*Elset, elset=FB_1_FB_2, generate
 57,  60,   1
*Nset, nset=FB_2_FB_3
 10, 11, 53, 54, 55
*Elset, elset=FB_2_FB_3, generate
 53,  56,   1
*Nset, nset=FB_3_FB_0
  9, 10, 50, 51, 52
*Elset, elset=FB_3_FB_0, generate
 49,  52,   1
*Nset, nset=FB
  9, 10, 50, 51, 52
*Elset, elset=FB, generate
 49,  52,   1
*Nset, nset=FB_0_MB_0
  2,  9, 43, 44, 45, 46, 47, 48, 49
*Elset, elset=FB_0_MB_0, generate
 41,  48,   1
*Nset, nset=FB0
 9,
*Nset, nset=FB_1_MB_1
  3, 12, 62, 63, 64, 65, 66, 67, 68
*Elset, elset=FB_1_MB_1, generate
 65,  72,   1
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*Elset, elset=FB_2_MB_2, generate
 77,  84,   1
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*Elset, elset=FB_3_MB_3, generate
 89,  96,   1
*Nset, nset=FB3
 10,
*Nset, nset=MB_0_RB_0
  2,  8, 40, 41, 42
*Elset, elset=MB_0_RB_0, generate
 37,  40,   1
*Nset, nset=MB_1_RB_1
  3,  4, 19, 20, 21
*Elset, elset=MB_1_RB_1, generate
  9,  12,   1
*Nset, nset=RB_2_MB_2
  5,  6, 25, 26, 27
*Elset, elset=RB_2_MB_2, generate
 17,  20,   1
*Nset, nset=RB_3_MB_3
  1,  7, 31, 32, 33
*Elset, elset=RB_3_MB_3, generate
 25,  28,   1
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*Elset, elset=RB_0_RB_1, generate
 33,  36,   1
*Nset, nset=RB_1_RB_2
  4,  5, 22, 23, 24
*Elset, elset=RB_1_RB_2, generate
 13,  16,   1
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*Elset, elset=RB_2_RB_3, generate
 73,  76,   1
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*Elset, elset=RB_3_RB_0, generate
 29,  32,   1
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*Nset, nset=RB
  7,  8, 34, 35, 36
*Elset, elset=RB, generate
 29,  32,   1
*Nset, nset=MB_0_MB_1
  2,  3, 16, 17, 18
*Elset, elset=MB_0_MB_1, generate
 5,  8,  1
*Nset, nset=MB_1_MB_2
  3,  6, 28, 29, 30
*Elset, elset=MB_1_MB_2, generate
 21,  24,   1
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*Elset, elset=MB_2_MB_3, generate
 85,  88,   1
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*Elset, elset=MB_3_MB_0, generate
 1,  4,  1
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*Nset, nset=FrameTop
  3,  6, 11, 12, 28, 29
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*Elset, elset=FrameTop
 21, 22, 23, 24, 57, 58
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*Nset, nset=FrameBot
  1,  2,  9, 10, 13, 14
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** Section: beam_625_035  Profile: tube_625_035
*Beam Section, elset=MB_3_MB_0, material=STEEL_4130_US, temperature=GRADIENTS, section=PIPE
0.3125, 0.035
1.,0.,0.
** Section: beam_625_035  Profile: tube_625_035
*Beam Section, elset=MB_0_MB_1, material=STEEL_4130_US, temperature=GRADIENTS, section=PIPE
0.3125, 0.035
1.,0.,0.
** Section: beam_625_035  Profile: tube_625_035
*Beam Section, elset=MB_1_RB_1, material=STEEL_4130_US, temperature=GRADIENTS, section=PIPE
0.3125, 0.035
0.,1.,0.
** Section: beam_625_035  Profile: tube_625_035
*Beam Section, elset=RB_1_RB_2, material=STEEL_4130_US, temperature=GRADIENTS, section=PIPE
0.3125, 0.035
1.,0.,0.
** Section: beam_625_035  Profile: tube_625_035
*Beam Section, elset=RB_2_MB_2, material=STEEL_4130_US, temperature=GRADIENTS, section=PIPE
0.3125, 0.035
0.,1.,0.
** Section: beam_625_035  Profile: tube_625_035
*Beam Section, elset=MB_1_MB_2, material=STEEL_4130_US, temperature=GRADIENTS, section=PIPE
0.3125, 0.035
1.,0.,0.
** Section: beam_625_035  Profile: tube_625_035
*Beam Section, elset=RB_3_MB_3, material=STEEL_4130_US, temperature=GRADIENTS, section=PIPE
0.3125, 0.035
0.,1.,0.
** Section: beam_625_035  Profile: tube_625_035
*Beam Section, elset=RB_3_RB_0, material=STEEL_4130_US, temperature=GRADIENTS, section=PIPE
0.3125, 0.035
1.,0.,0.
** Section: beam_625_035  Profile: tube_625_035
*Beam Section, elset=RB_0_RB_1, material=STEEL_4130_US, temperature=GRADIENTS, section=PIPE
0.3125, 0.035
1.,0.,0.
** Section: beam_625_035  Profile: tube_625_035
*Beam Section, elset=MB_0_RB_0, material=STEEL_4130_US, temperature=GRADIENTS, section=PIPE
0.3125, 0.035
0.,1.,0.
** Section: beam_625_035  Profile: tube_625_035
*Beam Section, elset=FB_0_MB_0, material=STEEL_4130_US, temperature=GRADIENTS, section=PIPE
0.3125, 0.035
0.,1.,0.
** Section: beam_625_035  Profile: tube_625_035
*Beam Section, elset=FB_3_FB_0, material=STEEL_4130_US, temperature=GRADIENTS, section=PIPE
0.3125, 0.035
1.,0.,0.
** Section: beam_625_035  Profile: tube_625_035
*Beam Section, elset=FB_2_FB_3, material=STEEL_4130_US, temperature=GRADIENTS, section=PIPE
0.3125, 0.035
1.,0.,0.
** Section: beam_625_035  Profile: tube_625_035
*Beam Section, elset=FB_1_FB_2, material=STEEL_4130_US, temperature=GRADIENTS, section=PIPE
0.3125, 0.035
1.,0.,0.
** Section: beam_625_035  Profile: tube_625_035
*Beam Section, elset=FB_0_FB_1, material=STEEL_4130_US, temperature=GRADIENTS, section=PIPE
0.3125, 0.035
1.,0.,0.
** Section: beam_625_035  Profile: tube_625_035
*Beam Section, elset=FB_1_MB_1, material=STEEL_4130_US, temperature=GRADIENTS, section=PIPE
0.3125, 0.035
0.,1.,0.
** Section: beam_625_035  Profile: tube_625_035
*Beam Section, elset=RB_2_RB_3, material=STEEL_4130_US, temperature=GRADIENTS, section=PIPE
0.3125, 0.035
1.,0.,0.
** Section: beam_625_035  Profile: tube_625_035
*Beam Section, elset=FB_2_MB_2, material=STEEL_4130_US, temperature=GRADIENTS, section=PIPE
0.3125, 0.035
0.,1.,0.
** Section: beam_625_035  Profile: tube_625_035
*Beam Section, elset=MB_2_MB_3, material=STEEL_4130_US, temperature=GRADIENTS, section=PIPE
0.3125, 0.035
1.,0.,0.
** Section: beam_625_035  Profile: tube_625_035
*Beam Section, elset=FB_3_MB_3, material=STEEL_4130_US, temperature=GRADIENTS, section=PIPE
0.3125, 0.035
0.,1.,0.
*End Part
**
*Part, name=Panel-Part1
*Node
      1,         -12.,           6.,         -6.5
      2,         -12.,           4.,         -6.5
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*Element, type=S8R
 1,   1,   2,   9,   8,  50,  51,  52,  53
 2,   2,   3,  10,   9,  54,  55,  56,  51
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*Nset, nset=panelFace, generate
   1,  133,    1
*Elset, elset=panelFace, generate
  1,  36,   1
*Nset, nset=panelEdges
   1,   2,   3,   4,   5,   6
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*Elset, elset=panelEdges
  1,  2,  3,  4,  5,  6
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*Nset, nset=FrontTopPanel_corners
  1,  7, 43, 49
** Section: panel-Section
*Shell Section, elset=panelFace, material=STEEL_4130_US
0.1, 5
*End Part
**
*Part, name=Panel-Part2
*Node
      1,         -12.,           6.,          6.5
      2,         -12.,           4.,          6.5
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*Element, type=S8R
 1,   1,   2,   9,   8,  50,  51,  52,  53
 2,   2,   3,  10,   9,  54,  55,  56,  51
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*Nset, nset=panelFace, generate
   1,  133,    1
*Elset, elset=panelFace, generate
  1,  36,   1
*Nset, nset=panelEdges
   1,   2,   3,   4,   5,   6
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*Elset, elset=panelEdges
  1,  2,  3,  4,  5,  6
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*Nset, nset=FrontBottomPanel_corners
  1,  7, 43, 49
** Section: panel-Section
*Shell Section, elset=panelFace, material=STEEL_4130_US
0.1, 5
*End Part
**
**
** ASSEMBLY
**
*Assembly, name=Assembly
**
*Instance, name=Frame_Instance, part=Frame
*End Instance
**
*Instance, name=panel-Instance1, part=Panel-Part1
*End Instance
**
*Instance, name=panel-Instance2, part=Panel-Part2
*End Instance
**
*Surface, type=NODE, name=Frame_Instance_FrameTop_CNS_, internal
Frame_Instance.FrameTop, 1.
*Surface, type=NODE, name=panel-Instance1_panelEdges_CNS_, internal
panel-Instance1.panelEdges, 1.
*Surface, type=NODE, name=Frame_Instance_FrameBot_CNS_, internal
Frame_Instance.FrameBot, 1.
*Surface, type=NODE, name=panel-Instance2_panelEdges_CNS_, internal
panel-Instance2.panelEdges, 1.
** Constraint: Constraint-1
*Tie, name=Constraint-1, adjust=yes, type=NODE TO SURFACE
panel-Instance1_panelEdges_CNS_, Frame_Instance_FrameTop_CNS_
** Constraint: Constraint-2
*Tie, name=Constraint-2, adjust=yes, type=NODE TO SURFACE
panel-Instance2_panelEdges_CNS_, Frame_Instance_FrameBot_CNS_
*End Assembly
**
** MATERIALS
** ------------------------------------------
**
*Material, name=STEEL_4130_US
*Density
 0.000735,
*Elastic
 2.97e+07, 0.29
** ----------------------------------------------------------------
**
*Step, name=BoundaryConditions, nlgeom=YES
*Static
0.01, 1., 1e-08, 1.
*Boundary
Frame_Instance.RB, ENCASTRE
*Restart, write, frequency=0
*Output, field, variable=PRESELECT
*End Step
*Step, name=Twist, nlgeom=YES
*Static
0.01, 1., 1e-08, 1.
*Cload
Frame_Instance.FB0, 3, 50
Frame_Instance.FB3, 3, -50
**
** OUTPUT REQUESTS
**
*Restart, write, frequency=0
**
** FIELD OUTPUT: F-Output-1
**
*Output, field, variable=PRESELECT
*End Step
